<?xml version="1.0"?>

	<aerodynamics>

		<axis name="LIFT">

			<!--   <function name="aero/force/Lift_propwash">
      <description>Delta lift due to propeller induced velocity</description>
      <product>
         <property>systems/propulsion/thrust-coefficient</property>
          <property>aero/qbar-psf</property>
          <property>metrics/Sw-sqft</property>
          <table name="aero/coefficient/CL_propwash">
            <independentVar lookup="row">aero/alpha-deg</independentVar>
            <independentVar lookup="column">fcs/flap-pos-deg</independentVar>
            <tableData>
                      0.0     60.0
              -7.45   0.000   0.000
               0.00   0.030   0.080
               13.18  0.159   0.424
               26.93  0.000   0.000
            </tableData>
          </table>
      </product>
    </function> -->

			<function name="aero/force/Lift_alpha">
				<description>Lift_due_to_alpha</description>
				<product>
					<property>aero/qbar-psf</property>
					<property>metrics/Sw-sqft</property>
					<table name="aero/coefficient/CL_alpha">
						<independentVar lookup="row">aero/alpha-deg</independentVar>
						<independentVar lookup="column">aero/Re</independentVar>
						<tableData>
						5.029E+07	7.544E+07	1.006E+08	2.012E+08	3.017E+08
					-10	-0.782	-0.782	-0.783	-0.789	-0.788
					-8	-0.575	-0.576	-0.577	-0.581	-0.583
					-6	-0.373	-0.374	-0.374	-0.377	-0.380
					-4	-0.178	-0.178	-0.179	-0.180	-0.182
					-2	0.010	0.010	0.010	0.010	0.010
					0	0.199	0.200	0.200	0.201	0.203
					2	0.394	0.395	0.395	0.398	0.399
					4	0.593	0.594	0.594	0.599	0.597
					6	0.800	0.801	0.802	0.808	0.802
					8	1.010	1.011	1.012	1.019	0.995
					10	1.205	1.206	1.207	1.213	1.157
					12	1.369	1.369	1.370	1.376	1.290
					14	1.504	1.505	1.505	1.510	1.391
					16	1.607	1.607	1.608	1.611	1.383
					18	1.638	1.638	1.638	1.640	1.230
					20	1.327	1.324	1.321	1.302	1.094
					22	0.943	0.943	0.944	0.950	1.011
					24	0.567	0.570	0.574	0.605	0.925
						</tableData>
					</table>
				</product>
			</function>

			<function name="aero/force/Lift_flap">
				<description>Lift_due_to_flaps</description>
				<product>
					<property>aero/qbar-psf</property>
					<property>metrics/Sw-sqft</property>
					<table name="aero/coefficient/CL_Flap">
						<independentVar>fcs/flap-pos-deg</independentVar>
						<tableData>
						0	0
						20	0.57
						35	0.88
						45	0.979
						</tableData>
					</table>
				</product>
			</function>

			<function name="aero/force/Lift_q">
				<description>Lift due to pitch rate</description>
				<product>
					<property>velocities/q-aero-rad_sec</property>
					<property>aero/qbar-psf</property>
					<property>metrics/Sw-sqft</property>
					<property>aero/ci2vel</property>
					<table name="aero/derivative/CL_q">
						<independentVar lookup="row">aero/Re</independentVar>
						<tableData>
						50290243	13.3800
						75436076	13.3800
						100580486	13.3900
						201155280	13.4800
						3.017E+08	13.5700
						4.023E+08	13.8000
						5.029E+08	14.1900
						6.035E+08	14.5600
						6.538E+08	14.4600
						</tableData>
					</table>
				</product>
			</function>

			<function name="aero/force/Lift_alphadot">
				<description>Lift due to AOA rate</description>
				<product>
					<property>aero/alphadot-rad_sec</property>
					<property>aero/qbar-psf</property>
					<property>metrics/Sw-sqft</property>
					<property>aero/ci2vel</property>
					<table name="aero/derivative/CL_ad">
						<independentVar lookup="row">aero/alpha-deg</independentVar>
						<tableData>
						-10	3.8960
						-8	3.9180
						-6	3.9370
						-4	3.9340
						-2	3.9200
						0	3.9250
						2	3.8450
						4	3.6230
						6	3.7460
						8	3.5430
						10	3.0400
						12	2.3480
						14	1.6490
						16	0.4424
						18	-2.2800
						20	-5.4020
						22	-5.9080
						24	-5.1440
						</tableData>
					</table>
				</product>
			</function>

			<function name="aero/force/Lift_elevator">
				<description>
				Lift due to Elevator Deflection
				Positive surface deflection is trailing edge down
				</description>
				<product>
					<property>aero/qbar-psf</property>
					<property>metrics/Sw-sqft</property>
					<table name="aero/coefficient/CL_Elevator">
						<independentVar lookup="row">fcs/elevator-pos-deg</independentVar>
						<tableData>
						-15	-0.186
						-10	-0.134
						0	0
						10	0.134
						20	0.192
						30	0.223
						35	0.245
						</tableData>
					</table>
				</product>
			</function>

		</axis>

		<axis name="DRAG">

			<function name="aero/force/Drag_alpha">
				<description>Drag_due_to_alpha</description>
				<product>
					<property>aero/qbar-psf</property>
					<property>metrics/Sw-sqft</property>
					<table name="aero/coefficient/CD_alpha">
						<independentVar lookup="row">aero/alpha-deg</independentVar>
						<tableData>
						-10	0.0380
						-8	0.0270
						-6	0.0200
						-4	0.0150
						-2	0.0140
						0	0.0150
						2	0.0200
						4	0.0280
						6	0.0390
						8	0.0530
						10	0.0700
						12	0.0860
						14	0.1010
						16	0.1140
						18	0.1190
						20	0.0890
						22	0.0700
						24	0.0530
						</tableData>
					</table>
				</product>
			</function>

			<function name="aero/force/Drag_elevator">
				<description>Drag due to Elevator Deflection</description>
				<product>
					<property>aero/qbar-psf</property>
					<property>metrics/Sw-sqft</property>
					<table name="aero/coefficient/CD_elevator">
						<independentVar lookup="column">fcs/elevator-pos-deg</independentVar>
						<independentVar lookup="row">aero/alpha-deg</independentVar>
						<tableData>
								-15			-10			0		10		20		30		35
							-10	0.02070		0.01320	 -0.00001 -0.00372 -0.00247 -0.00103 0.00027
							-4	0.01470		0.00884		0.00000	0.00060	0.00368	0.00614	0.00813
							0	0.01070		0.00596		0.00000	0.00349	0.00777	0.01090	0.01340
							10	0.00052		-0.00142	0.00001	0.01090	0.01830	0.02310	0.02680
							16	-0.00715	-0.00698	0.00001	0.01640	0.02610	0.03230	0.03690
							20	-0.01480	-0.01250	0.00002	0.02200	0.03400	0.04150	0.04700
							24	-0.02460	-0.01960	0.00002	0.02910	0.04410	0.05330	0.05990
						</tableData>
					</table>
				</product>
			</function>

			<function name="aero/force/Drag_gear">
				<description>Drag due to gear</description>
				<product>
					<property>aero/qbar-psf</property>
					<property>metrics/Sw-sqft</property>
					<property>gear/gear-pos-norm</property>
					<value>0.0230</value>
				</product>
			</function>

			<function name="aero/force/Drag_flap">
				<description>Drag due to flaps</description>
				<product>
					<property>aero/qbar-psf</property>
					<property>metrics/Sw-sqft</property>
					<table name="aero/coefficient/CD_flap">
						<independentVar lookup="column">fcs/flap-pos-deg</independentVar>
						<independentVar lookup="row">aero/alpha-deg</independentVar>
						<tableData>
							0		20		35		45
						-10	0.0000	-0.0142	-0.0094	-0.0059
						0	0.0000	0.0187	0.0416	0.0509
						20	0.0000	0.0847	0.1440	0.1640
						24	0.0000	0.0979	0.1640	0.1870
						</tableData>
					</table>
				</product>
			</function>

		</axis>

		<axis name="SIDE">

			<function name="aero/force/Side_beta">
				<description>Side force due to beta</description>
				<product>
					<property>aero/qbar-psf</property>
					<property>metrics/Sw-sqft</property>
					<property>aero/beta-rad</property>
					<value>-0.53</value>
				</product>
			</function>

			<function name="aero/force/Side_roll_rate">
				<description>Side force due to roll rate</description>
				<product>
					<property>aero/qbar-psf</property>
					<property>metrics/Sw-sqft</property>
					<property>aero/bi2vel</property>
					<property>velocities/p-aero-rad_sec</property>
					<table name="aero/coefficient/CY_p">
						<independentVar lookup="row">aero/alpha-deg</independentVar>
						<independentVar lookup="column">aero/Re</independentVar>
						<tableData>
								5.029E+07	7.544E+07	1.006E+08	2.012E+08
							-10	-0.0919	-0.0919	-0.0920	-0.0929
							-8	-0.0903	-0.0903	-0.0904	-0.0913
							-6	-0.0883	-0.0883	-0.0884	-0.0892
							-4	-0.0859	-0.0859	-0.0860	-0.0868
							-2	-0.0830	-0.0830	-0.0831	-0.0840
							0	-0.0804	-0.0804	-0.0805	-0.0813
							2	-0.0779	-0.0779	-0.0780	-0.0789
							4	-0.0757	-0.0757	-0.0758	-0.0766
							6	-0.0735	-0.0735	-0.0736	-0.0744
							8	-0.0717	-0.0717	-0.0718	-0.0725
							10	-0.0692	-0.0692	-0.0693	-0.0699
							12	-0.0649	-0.0649	-0.0650	-0.0655
							14	-0.0591	-0.0591	-0.0592	-0.0596
							16	-0.0529	-0.0529	-0.0529	-0.0532
							18	-0.0103	-0.0103	-0.0109	-0.0145
							20	0.0068	0.0068	0.0070	0.0084
							22	0.0413	0.0413	0.0412	0.0406
							24	0.0742	0.0742	0.0738	0.0716
						</tableData>
					</table>
				</product>
			</function>

			<!--			<function name="aero/force/Side_yaw_rate">
				<description>Side force due to yaw rate</description>
				<product>
					<property>aero/qbar-psf</property>
					<property>metrics/Sw-sqft</property>
					<property>aero/bi2vel</property>
					<property>velocities/r-aero-rad_sec</property>
					<value>0.5683</value>
				</product>
			</function> -->

			<function name="aero/force/Side_rudder">
				<description>Side force due to rudder</description>
				<product>
					<property>aero/qbar-psf</property>
					<property>metrics/Sw-sqft</property>
					<property>fcs/rudder-pos-deg</property>
					<value>0.00421</value>
				</product>
			</function>

		</axis>

		<axis name="PITCH">

			<!--			<function name="aero/moment/Pitch_propwash">
				<description>Pitch moment due to propeller induced velocity</description>
				<product>
					<property>systems/propulsion/thrust-coefficient</property>
					<property>aero/qbar-psf</property>
					<property>metrics/Sw-sqft</property>
					<property>metrics/cbarw-ft</property>
					<table name="aero/coefficient/CM_propwash">
						<independentVar lookup="row">aero/alpha-deg</independentVar>
						<independentVar lookup="column">fcs/flap-pos-deg</independentVar>
						<tableData>
                     0.0     60.0
              -0.01  0.000   0.000
               0.00 -0.004  -0.010
               0.23 -0.020  -0.055
               0.30  0.000   0.000
						</tableData>
					</table>
				</product>
			</function>  -->


			<function name="aero/force/Pitch_alpha">
				<description>Pitch_due_to_alpha</description>
				<product>
					<property>aero/qbar-psf</property>
					<property>metrics/Sw-sqft</property>
					<property>metrics/cbarw-ft</property>
					<table name="aero/coefficient/CM_alpha">
						<independentVar lookup="column">aero/Re</independentVar>
						<independentVar lookup="row">aero/alpha-deg</independentVar>
						<tableData>
							   5.029E+07	7.544E+07	1.006E+08	2.012E+08
							-10	0.5524	0.5525	0.5530	0.5570
							-8	0.4505	0.4507	0.4512	0.4548
							-6	0.3493	0.3495	0.3499	0.3530
							-4	0.2508	0.2511	0.2514	0.2540
							-2	0.1579	0.1581	0.1584	0.1604
							0	0.0700	0.0702	0.0704	0.0717
							2	-0.0146	-0.0144	-0.0143	-0.0138
							4	-0.0921	-0.0923	-0.0924	-0.0930
							6	-0.1864	-0.1868	-0.1872	-0.1886
							8	-0.2824	-0.2823	-0.2825	-0.2841
							10	-0.3817	-0.3816	-0.3819	-0.3843
							12	-0.4911	-0.4909	-0.4913	-0.4949
							14	-0.6134	-0.6131	-0.6135	-0.6180
							16	-0.7357	-0.7353	-0.7357	-0.7411
							18	-0.8580	-0.8575	-0.8579	-0.8642
							20	-0.9803	-0.9797	-0.9801	-0.9873
							22	-1.1026	-1.1019	-1.1023	-1.1104
							24	-1.2249	-1.2241	-1.2245	-1.2335
						</tableData>
					</table>
				</product>
			</function>

			<function name="aero/force/PitchMoment_flap">
				<description>PitchMoment_due_to_flaps</description>
				<product>
					<property>aero/qbar-psf</property>
					<property>metrics/Sw-sqft</property>
					<property>metrics/cbarw-ft</property>
					<table name="aero/coefficient/CM_Flap">
						<independentVar>fcs/flap-pos-deg</independentVar>
						<tableData>
						0	0
						20	-0.3338
						35	-0.4891
						45	-0.586
						</tableData>
					</table>
				</product>
			</function>

			<function name="aero/moment/Pitch_elevator">
				<description>Pitch moment due to elevator</description>
				<product>
					<property>aero/qbar-psf</property>
					<property>metrics/Sw-sqft</property>
					<property>metrics/cbarw-ft</property>
					<table name="aero/coefficient/CM_elevator">
						<independentVar lookup="row">fcs/elevator-pos-deg</independentVar>
						<tableData>
						-15	 0.6518
						-10	 0.4768
						0	-0.0005
						10	-0.4768
						20	-0.6848
						30	-0.8054
						35	-0.8839
						</tableData>
					</table>
				</product>
			</function>

			<function name="aero/moment/Pitch_damp">
				<description>Pitch moment due to pitch rate</description>
				<product>
					<property>aero/qbar-psf</property>
					<property>metrics/Sw-sqft</property>
					<property>metrics/cbarw-ft</property>
					<property>aero/ci2vel</property>
					<property>velocities/q-aero-rad_sec</property>
					<table name="aero/coefficient/CM_q">
						<independentVar lookup="row">aero/Re</independentVar>
						<tableData>
							50290243	-44.3100
							75436076	-44.3100
							100580486	-44.3400
							201155280	-44.5800
							3.017E+08	-44.7500
							4.023E+08	-45.3600
							5.029E+08	-46.4700
							6.035E+08	-46.5200
							6.538E+08	-46.5200
						</tableData>
					</table>
				</product>
			</function>

			<function name="aero/moment/Pitch_alphadot">
				<description>Pitch moment due to alpha rate</description>
				<product>
					<property>aero/qbar-psf</property>
					<property>metrics/Sw-sqft</property>
					<property>metrics/cbarw-ft</property>
					<property>aero/ci2vel</property>
					<property>aero/alphadot-rad_sec</property>
					<table name="aero/coeff/CM_alphadot">
						<independentVar lookup="row">aero/alpha-deg</independentVar>
						<tableData>
							-10	-15.4000
							-8	-15.4800
							-6	-15.5600
							-4	-15.5500
							-2	-15.4900
							0	-15.5100
							2	-15.1900
							4	-14.3100
							6	-14.8000
							8	-14.0000
							10	-12.0100
							12	-9.2790
							14	-6.5170
							16	-1.7480
							18	9.0090
							20	21.3500
							22	23.3500
							24	20.3300
						</tableData>
					</table>
				</product>
			</function>

		</axis>

		<axis name="ROLL">

			<function name="aero/moment/Roll_differential_propwash">
				<description>Roll moment due to differential propwash</description>
				<product>
					<property>systems/propulsion/thrust-coefficient-left-right</property>
					<property>aero/qbar-psf</property>
					<property>metrics/Sw-sqft</property>
					<property>metrics/bw-ft</property>
					<property>aero/alpha-rad</property>
					<value>-1.4635</value>
				</product>
			</function>

			<function name="aero/moment/Roll_beta">
				<description>Roll moment due to beta</description>
				<product>
					<property>aero/qbar-psf</property>
					<property>metrics/Sw-sqft</property>
					<property>metrics/bw-ft</property>
					<property>aero/beta-rad</property>
<!--					<property>fcs/gear-no-wow</property> -->
					<table name="aero/derivative/Cl_beta">
						<independentVar lookup="row">aero/alpha-deg</independentVar>
						<independentVar lookup="column">aero/Re</independentVar>
						<tableData>
					5.029E+07	7.544E+07	1.006E+08	2.012E+08	3.017E+08	4.023E+08	5.029E+08	6.035E+08	6.538E+08
				-10	-0.0846	-0.0847	-0.0848	-0.0851	-0.0860	-0.0869	-0.0887	-0.0910	-0.0924
				-8	-0.0822	-0.0823	-0.0824	-0.0828	-0.0837	-0.0846	-0.0865	-0.0887	-0.0900
				-6	-0.0797	-0.0798	-0.0799	-0.0803	-0.0813	-0.0823	-0.0842	-0.0865	-0.0879
				-4	-0.0769	-0.0770	-0.0771	-0.0777	-0.0787	-0.0798	-0.0818	-0.0844	-0.0860
				-2	-0.0740	-0.0741	-0.0742	-0.0748	-0.0759	-0.0772	-0.0794	-0.0822	-0.0841
				0	-0.0710	-0.0711	-0.0713	-0.0719	-0.0731	-0.0744	-0.0768	-0.0799	-0.0820
				2	-0.0680	-0.0682	-0.0683	-0.0690	-0.0702	-0.0717	-0.0741	-0.0774	-0.0797
				4	-0.0652	-0.0653	-0.0655	-0.0663	-0.0675	-0.0690	-0.0714	-0.0747	-0.0769
				6	-0.0624	-0.0626	-0.0627	-0.0636	-0.0647	-0.0661	-0.0683	-0.0712	-0.0733
				8	-0.0597	-0.0598	-0.0600	-0.0609	-0.0618	-0.0628	-0.0645	-0.0674	-0.0697
				10	-0.0567	-0.0569	-0.0570	-0.0579	-0.0584	-0.0588	-0.0605	-0.0632	-0.0659
				12	-0.0531	-0.0533	-0.0535	-0.0544	-0.0543	-0.0544	-0.0553	-0.0589	-0.0620
				14	-0.0489	-0.0491	-0.0493	-0.0502	-0.0494	-0.0480	-0.0500	-0.0546	-0.0580
				16	-0.0440	-0.0442	-0.0443	-0.0452	-0.0426	-0.0413	-0.0448	-0.0502	-0.0538
				18	-0.0378	-0.0380	-0.0381	-0.0389	-0.0334	-0.0349	-0.0396	-0.0456	-0.0494
				20	-0.0264	-0.0265	-0.0266	-0.0269	-0.0242	-0.0281	-0.0338	-0.0400	-0.0442
				22	-0.0130	-0.0131	-0.0132	-0.0137	-0.0154	-0.0214	-0.0279	-0.0347	-0.0391
				24	-0.0007	-0.0008	-0.0010	-0.0018	-0.0073	-0.0150	-0.0221	-0.0295	-0.0342
						</tableData>
					</table>
				</product>
			</function>

			<function name="aero/moment/Roll_damp">
				<description>Roll moment due to roll rate</description>
				<product>
					<property>aero/qbar-psf</property>
					<property>metrics/Sw-sqft</property>
					<property>metrics/bw-ft</property>
					<property>aero/bi2vel</property>
					<property>velocities/p-aero-rad_sec</property>
					<table name="aero/derivative/Cl_p">
						<independentVar lookup="row">aero/alpha-deg</independentVar>
						<independentVar lookup="column">aero/Re</independentVar>
						<tableData>
					5.029E+07	7.544E+07	1.006E+08	2.012E+08	3.017E+08	4.023E+08	5.029E+08	6.035E+08	6.538E+08
				-10	-0.4844	-0.4844	-0.4849	-0.4888	-0.4810	-0.4723	-0.4642	-0.4180	-0.3793
				-8	-0.4697	-0.4697	-0.4702	-0.4744	-0.4700	-0.4700	-0.4707	-0.4601	-0.4454
				-6	-0.4535	-0.4535	-0.4541	-0.4586	-0.4661	-0.4661	-0.4756	-0.4891	-0.4903
				-4	-0.4367	-0.4367	-0.4373	-0.4420	-0.4599	-0.4599	-0.4771	-0.5015	-0.5096
				-2	-0.4351	-0.4351	-0.4357	-0.4404	-0.4471	-0.4581	-0.4752	-0.4995	-0.5077
				0	-0.4487	-0.4487	-0.4493	-0.4537	-0.4609	-0.4609	-0.4701	-0.4835	-0.4850
				2	-0.4618	-0.4618	-0.4624	-0.4665	-0.4617	-0.4617	-0.4620	-0.4509	-0.4372
				4	-0.4717	-0.4717	-0.4722	-0.4760	-0.4500	-0.4500	-0.4146	-0.3718	-0.3424
				6	-0.4778	-0.4778	-0.4783	-0.4818	-0.4491	-0.3891	-0.3224	-0.2925	-0.2904
				8	-0.4542	-0.4542	-0.4542	-0.4545	-0.2937	-0.2937	-0.2605	-0.2469	-0.2809
				10	-0.3790	-0.3790	-0.3788	-0.3770	-0.2224	-0.2224	-0.1559	-0.2305	-0.2735
				12	-0.2881	-0.2881	-0.2879	-0.2864	-0.0335	-0.0335	-0.0850	-0.2422	-0.2893
				14	-0.1975	-0.1975	-0.1971	-0.1941	0.0233	0.1166	-0.1236	-0.2571	-0.2912
				16	-0.0443	-0.0443	-0.0437	-0.0396	0.0669	0.0669	-0.1583	-0.2613	-0.2832
				18	0.5654	0.5654	0.5707	0.6074	0.4972	0.0184	-0.1696	-0.2459	-0.2661
				20	1.0780	1.0780	1.0770	1.0680	-0.0315	-0.0315	-0.1688	-0.2292	-0.2493
				22	0.9798	0.9798	0.9688	0.8924	-0.0669	-0.0669	-0.1650	-0.2180	-0.2347
				24	0.7696	0.7696	0.7617	0.7069	-0.0625	-0.0625	-0.1464	-0.2085	-0.2143
						</tableData>
					</table>
				</product>
			</function>

			<function name="aero/moment/Roll_yaw_rate">
				<description>Roll moment due to yaw rate</description>
				<product>
					<property>aero/qbar-psf</property>
					<property>metrics/Sw-sqft</property>
					<property>metrics/bw-ft</property>
					<property>aero/bi2vel</property>
					<property>velocities/r-aero-rad_sec</property>
					<table name="aero/derivative/Cl_r">
						<independentVar lookup="row">aero/alpha-deg</independentVar>
						<tableData>
                            -10	-0.0782
							-8	-0.0464
							-6	-0.0158
							-4	0.0135
							-2	0.0415
							0	0.0705
							2	0.1005
							4	0.1313
							6	0.1625
							8	0.1939
							10	0.2212
							12	0.2406
							14	0.2537
							16	0.2591
							18	0.2484
							20	0.1594
							22	0.0705
							24	-0.0022
						</tableData>
					</table>
				</product>
			</function>

			<function name="aero/moment/Roll_aileron">
				<description>Roll moment due to aileron</description>
				<product>
					<property>aero/qbar-psf</property>
					<property>metrics/Sw-sqft</property>
					<property>metrics/bw-ft</property>
					<table name="aero/coeff/Cl_aileron">
						<independentVar lookup="row">fcs/aileron-difference-deg</independentVar>
						<tableData>
						-34	  -0.0422
						-26.8 -0.0362
						-17.9 -0.0246
						-8.9  -0.0123
						0	  0.0000
						8.9	  0.0123
						17.9  0.0246
						26.8  0.0362
						34	  0.0422
						</tableData>
					</table>
				</product>
			</function>

			<function name="aero/moment/Roll_rudder">
				<description>Roll moment due to rudder</description>
				<product>
					<property>aero/qbar-psf</property>
					<property>metrics/Sw-sqft</property>
					<property>metrics/bw-ft</property>
					<property>fcs/rudder-pos-deg</property>
					<value>0.000175</value>
				</product>
			</function>

		</axis>

		<axis name="YAW">

			<function name="aero/moment/Yaw_beta">
				<description>Yaw moment due to beta</description>
				<product>
					<property>aero/qbar-psf</property>
					<property>metrics/Sw-sqft</property>
					<property>metrics/bw-ft</property>
					<property>aero/beta-rad</property>
					<value>0.1365</value>
				</product>
			</function>

			<function name="aero/moment/Yaw_roll_rate">
				<description>Yaw moment due to roll rate</description>
				<product>
					<property>aero/qbar-psf</property>
					<property>metrics/Sw-sqft</property>
					<property>metrics/bw-ft</property>
					<property>aero/bi2vel</property>
					<property>velocities/p-rad_sec</property>
					<table name="aero/derivative/Cn_p">
						<independentVar lookup="row">aero/alpha-rad</independentVar>
						<tableData>
                -10	0.0695
				-8	0.0510
				-6	0.0327
				-4	0.0145
				-2	-0.0035
				0	-0.0219
				2	-0.0408
				4	-0.0601
				6	-0.0796
				8	-0.1006
				10	-0.1226
				12	-0.1427
				14	-0.1604
				16	-0.1778
				18	-0.2096
				20	-0.1840
				22	-0.1273
				24	-0.0886
						</tableData>
					</table>
				</product>
			</function>

			<function name="aero/moment/Yaw_damp">
				<description>Yaw moment due to yaw rate</description>
				<product>
					<property>aero/qbar-psf</property>
					<property>metrics/Sw-sqft</property>
					<property>metrics/bw-ft</property>
					<property>aero/bi2vel</property>
					<property>velocities/r-aero-rad_sec</property>
					<value>-0.15</value>
				</product>
			</function>

			<function name="aero/moment/Yaw_rudder">
				<description>Yaw moment due to rudder</description>
				<product>
					<property>aero/qbar-psf</property>
					<property>metrics/Sw-sqft</property>
					<property>metrics/bw-ft</property>
					<property>fcs/rudder-pos-deg</property>
					<value>-0.002</value>
				</product>
			</function>

			<function name="aero/moment/Yaw_aileron">
				<description>aileron yaw</description>
				<product>
					<property>aero/qbar-psf</property>
					<property>metrics/Sw-sqft</property>
					<property>metrics/bw-ft</property>
					<table name="aero/coeff/Cn_aileron">
						<independentVar lookup="row">fcs/aileron-difference-deg</independentVar>
						<independentVar lookup="column">aero/alpha-deg</independentVar>
						<tableData>
					-34.0	 -26.8	  -17.9	   -8.9	    0.0	    8.9	    17.9	26.8	34.0
				-10	-0.00233 -0.00200 -0.00136 -0.00068	0.00000	0.00068	0.00136	0.00200	0.00233
				-4	-0.00026 -0.00022 -0.00015 -0.00008	0.00000	0.00008	0.00015	0.00022	0.00026
				0	0.00107	0.00091	0.00062	0.00031	0.00000	-0.00031 -0.00062 -0.00091	-0.00107
				4	0.00247	0.00212	0.00144	0.00072	0.00000	-0.00072 -0.00144 -0.00212	-0.00247
				10	0.00454	0.00390	0.00264	0.00132	0.00000	-0.00132 -0.00264 -0.00390	-0.00454
				16	0.00555	0.00476	0.00323	0.00161	0.00000	-0.00161 -0.00323 -0.00476	-0.00555
				20	0.00346	0.00297	0.00202	0.00101	0.00000	-0.00101 -0.00202 -0.00297	-0.00346
				24	0.00083	0.00071	0.00048	0.00024	0.00000	-0.00024 -0.00048 -0.00071	-0.00083
						</tableData>
					</table>
				</product>
			</function>

		</axis>

	</aerodynamics>
